<?xml version="1.0" encoding="UTF-8"?>
<neuroml xmlns="http://www.neuroml.org/schema/neuroml2" xmlns:xsi="http://www.w3.org/2001/XMLSchema-instance" xsi:schemaLocation="http://www.neuroml.org/schema/neuroml2  https://raw.githubusercontent.com/NeuroML/NeuroML2/development/Schemas/NeuroML2/NeuroML_v2beta5.xsd" id="160606A_scaled_resample_5">

	<!-- soma -->
    <include href="na_s.channel.nml"/>
    <include href="kdr.channel.nml"/>
    <include href="k.channel.nml"/>
    <include href="cal.channel.nml"/>

    <!-- dend -->
    <include href="cah.channel.nml"/>
    <include href="kca.channel.nml"/>
    <include href="h.channel.nml"/>
    <include href="ca.nml"/>

    <!-- axon -->
    <include href="na_a.channel.nml"/>

    <!-- all  -->
    <include href="leak.channel.nml"/>

    <cell id="160606A_scaled_resample_5">

        <notes>Cell morphology generated by neuroConstruct from file: 160606A_scaled_resample_5.swc
TREES toolbox tree - 160606A_scaled_resample_5
written by an automatic procedure "swc_tree" part of the TREES package
in MATLAB
copyright 2009 Hermann Cuntz
inode R X Y Z D/2 idpar</notes>

        <morphology id="morphology_160606A_scaled_resample_5">

            <segment id="0" name="Comp_1">
                <proximal x="0.0" y="0.0" z="0.0" diameter="12.48"/>
                <distal x="0.0" y="0.0" z="0.0" diameter="12.48"/>
            </segment>

            <segment id="1" name="Comp_2">
                <parent segment="0" fractionAlong="0.5"/>
                <proximal x="0.0" y="0.0" z="0.0" diameter="2.49024"/>
                <distal x="-0.79927295" y="9.453373" z="0.34" diameter="2.49024"/>
            </segment>

            <segment id="2" name="Comp_3">
                <parent segment="0" fractionAlong="0.5"/>
                <proximal x="0.0" y="0.0" z="0.0" diameter="3.45024"/>
                <distal x="6.514566" y="-5.3598986" z="-1.0846672" diameter="3.45024"/>
            </segment>

            <segment id="3" name="Comp_4">
                <parent segment="0" fractionAlong="0.5"/>
                <proximal x="0.0" y="0.0" z="0.0" diameter="3.12"/>
                <distal x="-2.0029166" y="7.9232416" z="-2.6434166" diameter="3.12"/>
            </segment>

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
            <segmentGroup id="Soma" neuroLexId="sao864921383">    <!--
                This group contains an unbranched set of segments, and all of the segmentGroups marked with
                neuroLexId = sao864921383 form a non-overlapping set of all of the segments.
                These segmentGroups correspond to the 'cables' of NeuroML v1.8.1. -->

                <member segment="0"/>
            </segmentGroup>

            <segmentGroup id="Sec_Comp_2" neuroLexId="sao864921383">    <!--
                This group contains an unbranched set of segments, and all of the segmentGroups marked with
                neuroLexId = sao864921383 form a non-overlapping set of all of the segments.
                These segmentGroups correspond to the 'cables' of NeuroML v1.8.1. -->

                <member segment="1"/>

                <member segment="5"/>

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            </segmentGroup>

            <segmentGroup id="Sec_Comp_3" neuroLexId="sao864921383">    <!--
                This group contains an unbranched set of segments, and all of the segmentGroups marked with
                neuroLexId = sao864921383 form a non-overlapping set of all of the segments.
                These segmentGroups correspond to the 'cables' of NeuroML v1.8.1. -->

                <member segment="2"/>

                <member segment="7"/>

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            </segmentGroup>

            <segmentGroup id="Sec_Comp_4" neuroLexId="sao864921383">    <!--
                This group contains an unbranched set of segments, and all of the segmentGroups marked with
                neuroLexId = sao864921383 form a non-overlapping set of all of the segments.
                These segmentGroups correspond to the 'cables' of NeuroML v1.8.1. -->

                <member segment="3"/>

                <member segment="8"/>

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            </segmentGroup>

            <segmentGroup id="Sec_Comp_5" neuroLexId="sao864921383">    <!--
                This group contains an unbranched set of segments, and all of the segmentGroups marked with
                neuroLexId = sao864921383 form a non-overlapping set of all of the segments.
                These segmentGroups correspond to the 'cables' of NeuroML v1.8.1. -->

                <member segment="4"/>

                <member segment="11"/>

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            </segmentGroup>

            <segmentGroup id="Sec_Comp_7" neuroLexId="sao864921383">    <!--
                This group contains an unbranched set of segments, and all of the segmentGroups marked with
                neuroLexId = sao864921383 form a non-overlapping set of all of the segments.
                These segmentGroups correspond to the 'cables' of NeuroML v1.8.1. -->

                <member segment="6"/>

                <member segment="12"/>

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            </segmentGroup>

            <segmentGroup id="Sec_Comp_31" neuroLexId="sao864921383">    <!--
                This group contains an unbranched set of segments, and all of the segmentGroups marked with
                neuroLexId = sao864921383 form a non-overlapping set of all of the segments.
                These segmentGroups correspond to the 'cables' of NeuroML v1.8.1. -->

                <member segment="30"/>

                <member segment="37"/>

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            </segmentGroup>

            <segmentGroup id="Sec_Comp_35" neuroLexId="sao864921383">    <!--
                This group contains an unbranched set of segments, and all of the segmentGroups marked with
                neuroLexId = sao864921383 form a non-overlapping set of all of the segments.
                These segmentGroups correspond to the 'cables' of NeuroML v1.8.1. -->

                <member segment="34"/>

                <member segment="40"/>

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            </segmentGroup>

            <segmentGroup id="Sec_Comp_37" neuroLexId="sao864921383">    <!--
                This group contains an unbranched set of segments, and all of the segmentGroups marked with
                neuroLexId = sao864921383 form a non-overlapping set of all of the segments.
                These segmentGroups correspond to the 'cables' of NeuroML v1.8.1. -->

                <member segment="36"/>

                <member segment="47"/>
            </segmentGroup>

            <segmentGroup id="Sec_Comp_39" neuroLexId="sao864921383">    <!--
                This group contains an unbranched set of segments, and all of the segmentGroups marked with
                neuroLexId = sao864921383 form a non-overlapping set of all of the segments.
                These segmentGroups correspond to the 'cables' of NeuroML v1.8.1. -->

                <member segment="38"/>

                <member segment="48"/>

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            </segmentGroup>

            <segmentGroup id="Sec_Comp_42" neuroLexId="sao864921383">    <!--
                This group contains an unbranched set of segments, and all of the segmentGroups marked with
                neuroLexId = sao864921383 form a non-overlapping set of all of the segments.
                These segmentGroups correspond to the 'cables' of NeuroML v1.8.1. -->

                <member segment="41"/>

                <member segment="52"/>

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            </segmentGroup>

            <segmentGroup id="Sec_Comp_43" neuroLexId="sao864921383">    <!--
                This group contains an unbranched set of segments, and all of the segmentGroups marked with
                neuroLexId = sao864921383 form a non-overlapping set of all of the segments.
                These segmentGroups correspond to the 'cables' of NeuroML v1.8.1. -->

                <member segment="42"/>

                <member segment="50"/>
            </segmentGroup>

            <segmentGroup id="Sec_Comp_59" neuroLexId="sao864921383">    <!--
                This group contains an unbranched set of segments, and all of the segmentGroups marked with
                neuroLexId = sao864921383 form a non-overlapping set of all of the segments.
                These segmentGroups correspond to the 'cables' of NeuroML v1.8.1. -->

                <member segment="58"/>

                <member segment="64"/>

                <member segment="71"/>
            </segmentGroup>

            <segmentGroup id="Sec_Comp_60" neuroLexId="sao864921383">    <!--
                This group contains an unbranched set of segments, and all of the segmentGroups marked with
                neuroLexId = sao864921383 form a non-overlapping set of all of the segments.
                These segmentGroups correspond to the 'cables' of NeuroML v1.8.1. -->

                <member segment="59"/>

                <member segment="69"/>

                <member segment="75"/>

                <member segment="84"/>
            </segmentGroup>

            <segmentGroup id="Sec_Comp_74" neuroLexId="sao864921383">    <!--
                This group contains an unbranched set of segments, and all of the segmentGroups marked with
                neuroLexId = sao864921383 form a non-overlapping set of all of the segments.
                These segmentGroups correspond to the 'cables' of NeuroML v1.8.1. -->

                <member segment="73"/>

                <member segment="79"/>

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            </segmentGroup>

            <segmentGroup id="Sec_Comp_75" neuroLexId="sao864921383">    <!--
                This group contains an unbranched set of segments, and all of the segmentGroups marked with
                neuroLexId = sao864921383 form a non-overlapping set of all of the segments.
                These segmentGroups correspond to the 'cables' of NeuroML v1.8.1. -->

                <member segment="74"/>

                <member segment="81"/>

                <member segment="89"/>

                <member segment="98"/>
            </segmentGroup>

            <segmentGroup id="Sec_Comp_130" neuroLexId="sao864921383">    <!--
                This group contains an unbranched set of segments, and all of the segmentGroups marked with
                neuroLexId = sao864921383 form a non-overlapping set of all of the segments.
                These segmentGroups correspond to the 'cables' of NeuroML v1.8.1. -->

                <member segment="129"/>

                <member segment="136"/>

                <member segment="142"/>
            </segmentGroup>

            <segmentGroup id="Sec_Comp_132" neuroLexId="sao864921383">    <!--
                This group contains an unbranched set of segments, and all of the segmentGroups marked with
                neuroLexId = sao864921383 form a non-overlapping set of all of the segments.
                These segmentGroups correspond to the 'cables' of NeuroML v1.8.1. -->

                <member segment="131"/>

                <member segment="135"/>

                <member segment="140"/>
            </segmentGroup>

            <segmentGroup id="Sec_Comp_135" neuroLexId="sao864921383">    <!--
                This group contains an unbranched set of segments, and all of the segmentGroups marked with
                neuroLexId = sao864921383 form a non-overlapping set of all of the segments.
                These segmentGroups correspond to the 'cables' of NeuroML v1.8.1. -->

                <member segment="134"/>

                <member segment="141"/>

                <member segment="147"/>
            </segmentGroup>

            <segmentGroup id="Sec_Comp_139" neuroLexId="sao864921383">    <!--
                This group contains an unbranched set of segments, and all of the segmentGroups marked with
                neuroLexId = sao864921383 form a non-overlapping set of all of the segments.
                These segmentGroups correspond to the 'cables' of NeuroML v1.8.1. -->

                <member segment="138"/>
            </segmentGroup>

            <segmentGroup id="Sec_Comp_154" neuroLexId="sao864921383">    <!--
                This group contains an unbranched set of segments, and all of the segmentGroups marked with
                neuroLexId = sao864921383 form a non-overlapping set of all of the segments.
                These segmentGroups correspond to the 'cables' of NeuroML v1.8.1. -->

                <member segment="153"/>

                <member segment="158"/>

                <member segment="159"/>
            </segmentGroup>

            <segmentGroup id="Sec_Comp_156" neuroLexId="sao864921383">    <!--
                This group contains an unbranched set of segments, and all of the segmentGroups marked with
                neuroLexId = sao864921383 form a non-overlapping set of all of the segments.
                These segmentGroups correspond to the 'cables' of NeuroML v1.8.1. -->

                <member segment="155"/>

                <member segment="157"/>
            </segmentGroup>

            <segmentGroup id="all">
                <include segmentGroup="Soma"/>
                <include segmentGroup="Sec_Comp_2"/>
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            </segmentGroup>

            <segmentGroup id="soma_group" neuroLexId="GO:0043025">    <!--Soma group-->

                <include segmentGroup="Soma"/>
            </segmentGroup>

            <segmentGroup id="Colour_White">
                <include segmentGroup="Soma"/>
            </segmentGroup>

            <segmentGroup id="Colour_DarkGrey">
                <include segmentGroup="Sec_Comp_2"/>
                <include segmentGroup="Sec_Comp_3"/>
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            </segmentGroup>

            <segmentGroup id="axon_group" neuroLexId="GO:0030424">    <!--Axon group-->

                <include segmentGroup="Sec_Comp_2"/>
                <include segmentGroup="Sec_Comp_3"/>
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            </segmentGroup>

        </morphology>

            <!--Adding the biophysical parameters-->

                <biophysicalProperties id="biophys">

            <membraneProperties>
                <!-- soma -->
                <channelDensity condDensity="30 mS_per_cm2" id="na_s_soma" segmentGroup="soma_group" ionChannel="na_s" ion="na" erev="55 mV"/>
                <channelDensity condDensity="30 mS_per_cm2" id="kdr_soma" segmentGroup="soma_group"
                ionChannel="kdr" ion="k" erev="-75 mV"/>
                <channelDensity condDensity="15 mS_per_cm2" id="k_soma" segmentGroup="soma_group"
                ionChannel="k" ion="k" erev="-75 mV"/>
                <channelDensity condDensity="20 mS_per_cm2" id="cal_soma" segmentGroup="soma_group"
                ionChannel="cal" ion="cal" erev="120 mV"/>

                <!-- dendrite 10 35 25-->
                <channelDensity condDensity="10 mS_per_cm2" id="cah_dend" segmentGroup="dendrite_group" ionChannel="cah" ion="ca" erev="120 mV"/>
                <channelDensity condDensity="35 mS_per_cm2" id="kca_dend" segmentGroup="dendrite_group" ionChannel="kca" ion="k" erev="-75 mV"/>
                <channelDensity condDensity="25 mS_per_cm2" id="h_dend" segmentGroup="dendrite_group" ionChannel="h" ion="k" erev="-43 mV"/>

                <!-- axon -->
                <channelDensity condDensity="200 mS_per_cm2" id="na_axon" segmentGroup="axon_group" ionChannel="na_a" ion="na" erev="55 mV"/>
                <channelDensity condDensity="200 mS_per_cm2" id="k_axon" segmentGroup="axon_group" ionChannel="k" ion="k" erev="-75 mV"/>

                <channelDensity condDensity="1.3e-2 mS_per_cm2" id="leak_all" segmentGroup="all" ionChannel="leak" ion="_leak" erev="10 mV"/>

                <spikeThresh value="0 mV"/>
                <specificCapacitance value="1 uF_per_cm2"/>
                <initMembPotential value="-65.0 mV"/>

            </membraneProperties>

            <intracellularProperties>
                <species segmentGroup="dendrite_group" id="ca" ion="ca" concentrationModel="ca_conc" initialConcentration="3.7152 mM" initialExtConcentration="3.0mM"/>

                <resistivity value=".1 ohm_cm" segmentGroup="soma_group"/>
                <resistivity value=".1 ohm_cm" segmentGroup="dendrite_group"/>
                <resistivity value=".1 ohm_cm" segmentGroup="axon_group"/>
            </intracellularProperties>

        </biophysicalProperties>

    </cell>

</neuroml>
