<neuroml xmlns="http://www.neuroml.org/schema/neuroml2"  xmlns:xs="http://www.w3.org/2001/XMLSchema" xmlns:xsi="http://www.w3.org/2001/XMLSchema-instance" xsi:schemaLocation="http://www.neuroml.org/schema/neuroml2 https://raw.github.com/NeuroML/NeuroML2/development/Schemas/NeuroML2/NeuroML_v2.1.xsd" id="net">
    <include href="C51B_scaled_exp_resample_5.cell.nml"/>
    <pulseGenerator id="iclamp0" delay="200ms" duration="50ms" amplitude="-1nA"/>
    <network id="net" type="networkWithTemperature" temperature="35degC">
        <population id="pop" component="C51B" size="1" type="populationList">
            <instance id="0">
                <location x="0." y="0." z="0."/>
            </instance>
        </population>
        <inputList id="clamps" population="pop" component="iclamp0">
            <input id="0" target="../pop/0/C51B" destination="synapses"/>
        </inputList>
    </network>
</neuroml>
