<neuroml xmlns="http://www.neuroml.org/schema/neuroml2"
  xmlns:xsi="http://www.w3.org/2001/XMLSchema-instance"
  xsi:schemaLocation="http://www.neuroml.org/schema/neuroml2  https://raw.github.com/NeuroML/NeuroML2/master/Schemas/NeuroML2/NeuroML_v2beta.xsd"
  id="C160802A_scaled_resample_5">

    <!-- soma -->
    <include href="na_s.channel.nml"/>
    <include href="kdr.channel.nml"/>
    <include href="k.channel.nml"/>
    <include href="cal.channel.nml"/>

    <!-- dend -->
    <include href="cah.channel.nml"/>
    <include href="kca.channel.nml"/>
    <include href="h.channel.nml"/>
    <include href="ca.nml"/>

    <!-- axon -->
    <include href="na_a.channel.nml"/>

    <!-- all  -->
    <include href="leak.channel.nml"/>

    <cell id="C160802A">

      <notes>
        Neuronal morphology exported in NeuroML v2beta from CVapp (NeuroMorpho.org version)
        Original file: C:\Users\naomi\Cvapp-NeuroMorpho.org\examples\C160802A_scaled_resample_5.swc </notes>

      <morphology id="morphology_C160802A_scaled_resample_5">

        <segment id="0" name="Seg_0"> <!-- "Cable" is 0-->

          <proximal x="0" y="0" z="0" diameter="15.034"/>
          <distal x="0" y="0" z="0" diameter="15.034"/>
        </segment>

        <!-- Parent point is on soma! Not creating 'real' segment -->

        <segment id="1" name="Seg_1"> <!-- "Cable" is 1-->
          <parent segment="0"/>
          <proximal x="1.694" y="-4.666" z="-7.24" diameter="1.9"/>
          <distal x="0.434" y="-7.545" z="-8.67" diameter="1.449"/>
        </segment>

        <segment id="2" name="Seg_2"> <!-- "Cable" is 2-->
          <parent segment="1"/>
          <proximal x="0.434" y="-7.545" z="-8.67" diameter="1.449"/>
          <distal x="-3.152" y="-10.905" z="-8.502" diameter="1.093"/>
        </segment>

        <segment id="3" name="Seg_3"> <!-- "Cable" is 2-->
          <parent segment="2"/>
          <distal x="-6.538" y="-14.508" z="-7.985" diameter="1.805"/>
        </segment>

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
        <!-- Parent point is on soma! Not creating 'real' segment -->

        <segmentGroup id="Cable_30" >
          <member segment="209"/>
          <member segment="210"/>
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        </segmentGroup>

        <segmentGroup id="Cable_31" >
          <member segment="268"/>
          <member segment="269"/>
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        </segmentGroup>

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
        <segmentGroup id="soma_group" >
          <include segmentGroup="Cable_0"/>
        </segmentGroup>

        <segmentGroup id="all" >
          <include segmentGroup="Cable_0"/>
          <include segmentGroup="Cable_1"/>
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        </segmentGroup>

        <segmentGroup id="SWC_group_7" >
          <include segmentGroup="Cable_2"/>
          <include segmentGroup="Cable_5"/>
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        </segmentGroup>

        <segmentGroup id="axon_group" >
          <include segmentGroup="Cable_33"/>
        </segmentGroup>

        <segmentGroup id="dendrite_group" >
          <include segmentGroup="Cable_1"/>
          <include segmentGroup="Cable_2"/>
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        </segmentGroup>

        <segmentGroup id="basal_dendrite" >
          <include segmentGroup="Cable_1"/>
          <include segmentGroup="Cable_3"/>
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        </segmentGroup>

      </morphology>

  <biophysicalProperties id="biophys">

            <membraneProperties>
                <!-- soma -->
                <channelDensity condDensity="30 mS_per_cm2" id="na_s_soma" segmentGroup="soma_group" ionChannel="na_s" ion="na" erev="55 mV"/>
                <channelDensity condDensity="30 mS_per_cm2" id="kdr_soma" segmentGroup="soma_group"
                ionChannel="kdr" ion="k" erev="-75 mV"/>
                <channelDensity condDensity="15 mS_per_cm2" id="k_soma" segmentGroup="soma_group"
                ionChannel="k" ion="k" erev="-75 mV"/>
                <channelDensity condDensity="20 mS_per_cm2" id="cal_soma" segmentGroup="soma_group"
                ionChannel="cal" ion="ca" erev="120 mV"/>

                <!-- dendrite 10 35 25-->
                <channelDensity condDensity="10 mS_per_cm2" id="cah_dend" segmentGroup="basal_dendrite" ionChannel="cah" ion="ca" erev="120 mV"/>
                <channelDensity condDensity="35 mS_per_cm2" id="kca_dend" segmentGroup="basal_dendrite" ionChannel="kca" ion="k" erev="-75 mV"/>
                <channelDensity condDensity="25 mS_per_cm2" id="h_dend" segmentGroup="basal_dendrite" ionChannel="h" ion="h" erev="-43 mV"/>

                <!-- axon -->
                <channelDensity condDensity="200 mS_per_cm2" id="na_axon" segmentGroup="axon_group" ionChannel="na_a" ion="na" erev="55 mV"/>
                <channelDensity condDensity="200 mS_per_cm2" id="k_axon" segmentGroup="axon_group" ionChannel="k" ion="k" erev="-75 mV"/>

                <channelDensity condDensity="1.3e-2 mS_per_cm2" id="leak_all" segmentGroup="all" ionChannel="leak" ion="non_specific" erev="10 mV"/>

                <spikeThresh value="0 mV"/>
                <specificCapacitance value="1 uF_per_cm2"/>
                <initMembPotential value="-65.0 mV"/>

            </membraneProperties>

            <intracellularProperties>
                <species segmentGroup="basal_dendrite" id="ca" ion="ca" concentrationModel="ca_conc" initialConcentration="3.7152 mM" initialExtConcentration="3.0mM"/>

                <resistivity value=".1 ohm_cm" segmentGroup="all"/>

            </intracellularProperties>

        </biophysicalProperties>

    </cell>

</neuroml>
