<neuroml xmlns="http://www.neuroml.org/schema/neuroml2"  xmlns:xs="http://www.w3.org/2001/XMLSchema" xmlns:xsi="http://www.w3.org/2001/XMLSchema-instance" xsi:schemaLocation="http://www.neuroml.org/schema/neuroml2 https://raw.github.com/NeuroML/NeuroML2/development/Schemas/NeuroML2/NeuroML_v2.1.xsd" id="net">
    <include href="C51A_scaled_exp_resample_5.cell.nml"/>
    <pulseGenerator id="iclamp0" delay="500ms" duration="200ms" amplitude="-1nA"/>
    <network id="net" type="networkWithTemperature" temperature="20degC">
        <population id="pop24" component="C51A" size="1" type="populationList">
            <instance id="0">
                <location x="0." y="800." z="0."/>
            </instance>
        </population>
        <inputList id="clamps" population="pop24" component="iclamp0">
            <input id="0" target="../pop24/0/C51A" destination="synapses"/>
        </inputList>
    </network>
</neuroml>
